Simulations
  DataStore
  Simulation MultiRootZone: Area=0; Slope=0
    ControlledEnvironment: MaxT=15; MinT=15; Rain=0; Radn=15; PanEvap=3; VP=2; Wind=3; CO2=350; Latitude=-45; DayLength=12
    Clock: StartDate=2000-01-01; EndDate=2000-03-31
    Summary
    SoilArbitrator Soil Arbitrator
    Zone 1_Slurp1_Primary: Area=0; Slope=0
      Soil: Latitude=0; Longitude=0; Area=0
        Analysis: Thickness=[100, 200, 300, 300, 300, 300]; PH=[6.6, 6.2, 5.7, 5.5, 5.5, 5.5]; PHUnits=Water; BoronUnits=HotWater
        InitialWater Initial water: PercentMethod=EvenlyDistributed; FractionFull=1
        Water
          Thickness  BD   AirDry  LL15  DUL   SAT
          100        1.2  0.08    0.13  0.33  0.5
          200        1.2  0.13    0.13  0.33  0.5
          300        1.2  0.1     0.1   0.31  0.44
          300        1.2  0.06    0.06  0.15  0.46
          300        1.2  0.04    0.04  0.1   0.44
          300        1.2  0.02    0.02  0.06  0.44
          SoilCrop SlurpSoil: LL=[0.13, 0.13, 0.1, 0.08, 0.11, 0.11]; KL=[0.06, 0.06, 0.06, 0.06, 0.06, 0.06]; XF=[1, 1, 1, 1, 1, 1]
          SoilCrop PotatoSoil: LL=[0.13, 0.13, 0.27, 0.27, 0.3, 0.3]; KL=[0.1, 0.06, 0.03, 0.01, 0, 0]; XF=[1, 1, 0.1, 0, 0, 0]
        SoilWater: SummerDate=1-Nov; SummerU=9; SummerCona=4.4; WinterDate=1-Apr; WinterU=9; WinterCona=4.4; DiffusConst=88; DiffusSlope=35.4; Salb=0.18; CN2Bare=68; CNRed=20; CNCov=0.8; slope=0; discharge_width=0; catchment_area=0; max_pond=0; residueinterception=0
          Thickness  SWCON  KLAT
          100        0.55   0
          200        0.55   0
          300        0.55   0
          300        0.55   0
          300        0.55   0
          300        0.55   0
        SoilNitrogen: fom_type=[default, manure, mucuna, lablab, shemp, stable]; fract_carb=[0.2, 0.3, 0.54, 0.57, 0.45, 0]; fract_cell=[0.7, 0.3, 0.37, 0.37, 0.47, 0.1]; fract_lign=[0.1, 0.4, 0.09, 0.06, 0.08, 0.9]; wfpsN2N2O_x=[22, 88]; wfpsN2N2O_y=[0.1, 1]; oc=[1.83566, 1.46334, 1.19884, 1.0301, 0.470338, 0.470138]
        SoilOrganicMatter: RootCN=30; RootWt=3000; SoilCN=11.5; EnrACoeff=7.4; EnrBCoeff=0.2; OCUnits=Total
          Thickness  OC    FBiom  FInert
          100        1.82  0.025  0.3
          200        1.47  0.025  0.4
          300        1.2   0.015  0.75
          300        1.03  0.01   0.9
          300        0.47  0.01   0.96
          300        0.47  0.01   0.96
        Sample Initial nitrogen: NO3Units=kgha; NH4Units=ppm; SWUnits=Volumetric; OCUnits=Total; PHUnits=Water
          Thickness  NO3  NH4
          100        17   0
          200        30   0
          300        5    0
          300        5    0
          300        0    0
          300        0    0
      Plant Slurp: CropType=Slurp
      MicroClimate: a_interception=0; b_interception=1; c_interception=0; d_interception=0; soil_albedo=0.23; air_pressure=1010; soil_emissivity=0.96; sun_angle=15; soil_heat_flux_fraction=0.4; night_interception_fraction=0.5; windspeed_default=3; refheight=2; albedo=0.26; emissivity=0.96; gsmax=0.01; r50=200
      Irrigation
      Fertiliser
      Manager SlurpSowingRule
        CultivarName = StaticCrop
        InitialRootDepth = 600
        SowingDate = 2000-01-01
```csharp
using System;
using Models.Core;
using Models.PMF;
using APSIM.Shared.Utilities;
        
namespace Models
{
	[Serializable] 
	[System.Xml.Serialization.XmlInclude(typeof(Model))]
	public class Script : Model
	{
		[Link] Plant Slurp;
		[Link] Clock Clock;

		[Description("Cultivar")]
		public string CultivarName { get; set; }
		[Description("Initial Root Depth")]
		public double InitialRootDepth { get; set; }
		[Description("Sowing Date")]
		public DateTime SowingDate { get; set; }

               
		[EventSubscribe("DoManagement")]
		private void OnDoManagement(object sender, EventArgs e)
		{
			if (Clock.Today.Date == SowingDate)
				Slurp.Sow(cultivar: CultivarName, population: 1, depth: InitialRootDepth, rowSpacing: 150);
			//Potato.Sow(... Contains the following arguements:
			//Population  double  Optional  Seeds sowing/m2.  Default is zero
			//Cultivar    string  Required  "NameOfCultivar"
			//Depth       double  Optional  Depth (mm) seed sown.   Default is 100mm 
			//MaxCover    double  Optional  Proportion (0-1) of the ground row crop will cover.   Default is 1.0
			//BudNumber   double  Optional  Number of mainstems per seed sown.  Default is 1.0
			//RowSpacing  double  Optional  Spaceing (mm) between drill rows when crop is sown.  Default is 150mm
			//CropClass   string  Optional  Crop class to instantiate when crop is sown.  Default is "Plant"
		}
	}
}
```
      SurfaceOrganicMatter surface organic matter: PondActive=no; ReportAdditions=no; ReportRemovals=no; PoolName=wheat; type=wheat; mass=2000; standing_fraction=0; cnr=80; CriticalResidueWeight=2000; OptimumDecompTemp=20; MaxCumulativeEOS=20; CNRatioDecompCoeff=0.277; CNRatioDecompThreshold=25; TotalLeachRain=25; MinRainToLeach=10; CriticalMinimumOrganicC=0.004; DefaultCPRatio=0; DefaultStandingFraction=0; StandingExtinctCoeff=0.5; FractionFaecesAdded=0.5
        Pools:
          {PoolName=wheat, ResidueType=wheat, Mass=2000, CNRatio=80, StandingFraction=0}
        ResidueTypes: LoadFromResource=ResidueTypes
        TillageTypes TillageTypesList
      Report: EventNames=[Clock].DoReport
        VariableNames:
          [Clock].Today
          sum([Soil].SoilWater.SWmm) as SumSW
          [Slurp].Leaf.PotentialEP
          [Slurp].Root.WaterUptake
          [Slurp].Root.InitialDM
          [Slurp].Root.Live.Wt
          [Slurp].Root.WaterUptakeByZone
          sum([Slurp].Root.WaterUptakeByZone) as SumWaterUptakeByZone
      Manager ResetProduction
        OverRidePath = Slurp.Leaf.Photosynthesis.Value
        OverRideInterger = 0
        ChangeDate = 2000-01-01
```csharp
using System;
using Models.Core;
using System.Collections.Generic;
using System.Text;
using Models.PMF;
using Models;
using System.Xml.Serialization;
using APSIM.Shared.Utilities;

namespace Models
{
	[Serializable] 
	public class Script : Model
	{
		[Link] Plant Plant;
		[Link] Clock Clock;
		[Link] Zone zone;
		
		[Description("Path for coefficient to be Overwritten")]
		public string OverRidePath { get; set; }
		[Description("Value for new coefficient Interger")]
		public int OverRideInterger { get; set; }
		[Description("Sowing Date")]
		public DateTime ChangeDate { get; set; }
        
		[EventSubscribe("DoManagement")]
		private void OnDoManagement(object sender, EventArgs e)
		{
			if (Clock.Today.Date == ChangeDate)
			{
				object ResetValue = OverRideInterger;
				zone.Set(OverRidePath, ResetValue);
			}
		}
	}
}
```
      Manager ResetLAI
        OverRidePath = Slurp.Leaf.LAIFunction.Value
        OverRideInterger = 12
        ChangeDate = 2000-01-01
        script: same as in MultiRootZone.1_Slurp1_Primary.ResetProduction
      Manager SetupRootZones
```csharp
using System;
using Models.Core;
using System.Collections.Generic;
using System.Text;
using Models.PMF;
using Models;
using System.Xml.Serialization;
using APSIM.Shared.Utilities;

namespace Models
{
	[Serializable] 
	public class Script : Model
	{
		[Link] Plant Slurp;
		[Link] Clock Clock;
		[Link] Zone zone;
        
		[EventSubscribe("Commencing")]
		private void OnSimulationCommencing(object sender, EventArgs e)
		{
			Slurp.Root.ZoneNamesToGrowRootsIn.Add("2_Slurp1_Secondary");
			//Slurp.Root.ZoneNamesToGrowRootsIn.Add("Zone3");
			Slurp.Root.ZoneRootDepths.Add(600);
			//Slurp.Root.ZoneRootDepths.Add(150);
			Slurp.Root.ZoneInitialDM.Add(50000);
			//Slurp.Root.ZoneInitialDM.Add(1000);
		}
	}
}
```
      Manager Automatic irrigation based on water deficit
        FASW = 0
        WaterDeficit = 0
        AutoIrrigationOn = False
        FASWThreshold = 0.95
        FASWDepth = 600
```csharp
using System;
using Models.Core;
using System.Collections.Generic;
using System.Text;
using Models.Soils;
using Models.PMF;
using Models;
using System.Xml.Serialization;
using APSIM.Shared.Utilities;

namespace Models
{
	[Serializable] 
	public class Script : Model
	{
		public double FASW { get; set; }
		public double WaterDeficit  { get; set; }
	
		[Link] Zone zone;
		[Link] Irrigation irrigation;
		[Link] Soil soil;
		
		[Description("Auto irrigation on?")]
		public bool AutoIrrigationOn { get; set; }

		[Description("Threshold fraction available water (0-1)")]
		public double FASWThreshold { get; set; }

		[Description("Soil depth (mm) to which fraction available water is calculated")]
		public double FASWDepth { get; set; }

		[EventSubscribe("DoManagement")]
		private void OnDoManagement(object sender, EventArgs e)
		{
			CalculateFASW();
			if (AutoIrrigationOn)
			{
				if (FASW < FASWThreshold)
				{
					double amount = 10;
					irrigation.Apply(WaterDeficit, depth: 0);
				}
			}
		}
		
		private void CalculateFASW()
		{
			double[] LL15 = MathUtilities.Multiply(soil.LL15, soil.Thickness);
			double[] DUL = MathUtilities.Multiply(soil.DUL, soil.Thickness);
		
			int nlayr = GetLayerIndex();
			double cumdep = MathUtilities.Sum(soil.Thickness, 0, nlayr, 0.0);

			double excess_fr = MathUtilities.Divide((cumdep - FASWDepth), soil.Thickness[nlayr], 0.0);

			// note that results may be strange if swdep < ll15
			double avail_sw = (MathUtilities.Sum(soil.Water, 0, nlayr, 0.0)
			                  - excess_fr * soil.Water[nlayr])
			                  - (MathUtilities.Sum(LL15, 0, nlayr, 0.0)
			                  - excess_fr * LL15[nlayr]);


			double pot_avail_sw = (MathUtilities.Sum(DUL, 0, nlayr, 0.0)
			                      - excess_fr * DUL[nlayr])
			                      - (MathUtilities.Sum(LL15, 0, nlayr, 0.0)
			                      - excess_fr * LL15[nlayr]);

			FASW = MathUtilities.Divide(avail_sw, pot_avail_sw, 0.0);
			WaterDeficit = MathUtilities.Constrain(pot_avail_sw - avail_sw, 0.0, 100000);
		}

		private int GetLayerIndex()
		{
			double[] cumThickness = Soil.ToCumThickness(soil.Thickness);
			for (int i = 1; i < cumThickness.Length; i++)
			{
				if (FASWDepth < cumThickness[i])
					return i - 1;
			}
			
			return cumThickness.Length - 1;
		}

	}
}
```
    Zone 2_Slurp1_Secondary: Area=0; Slope=0
      Soil: same as MultiRootZone.1_Slurp1_Primary.Soil
      SurfaceOrganicMatter surface organic matter: same as MultiRootZone.1_Slurp1_Primary.surface organic matter
      Report: EventNames=[Clock].DoReport
        VariableNames:
          [Clock].Today
          sum([Soil].SoilWater.SWmm) as SumSW
      Fertiliser
      Irrigation
      Manager Automatic irrigation based on water deficit: same as MultiRootZone.1_Slurp1_Primary.Automatic irrigation based on water deficit
  Simulation SingleZone: Area=0; Slope=0
    ControlledEnvironment: MaxT=15; MinT=15; Rain=0; Radn=15; PanEvap=3; VP=2; Wind=3; CO2=350; Latitude=-45; DayLength=12
    Clock: StartDate=2000-01-01; EndDate=2000-03-31
    Summary
    SoilArbitrator Soil Arbitrator
    Zone Slurp_Solo: Area=0; Slope=0
      Soil: Latitude=0; Longitude=0; Area=0
        Analysis: Thickness=[100, 200, 300, 300, 300, 300]; PH=[6.6, 6.2, 5.7, 5.5, 5.5, 5.5]; PHUnits=Water; BoronUnits=HotWater
        InitialWater Initial water: PercentMethod=EvenlyDistributed; FractionFull=1
        Water
          Thickness  BD   AirDry  LL15  DUL   SAT
          100        1.2  0.08    0.13  0.33  0.5
          200        1.2  0.13    0.13  0.33  0.5
          300        1.2  0.1     0.1   0.31  0.44
          300        1.2  0.06    0.06  0.15  0.46
          300        1.2  0.04    0.04  0.1   0.44
          300        1.2  0.02    0.02  0.06  0.44
          SoilCrop SlurpSoil: LL=[0.13, 0.13, 0.1, 0.08, 0.11, 0.11]; KL=[0.1, 0.1, 0.1, 0.06, 0.06, 0.06]; XF=[1, 1, 1, 1, 1, 1]
          SoilCrop PotatoSoil: LL=[0.13, 0.13, 0.27, 0.27, 0.3, 0.3]; KL=[0.1, 0.06, 0.03, 0.01, 0, 0]; XF=[1, 1, 0.1, 0, 0, 0]
        SoilWater: same as MultiRootZone.1_Slurp1_Primary.Soil.SoilWater
        SoilNitrogen: same as MultiRootZone.1_Slurp1_Primary.Soil.SoilNitrogen
        SoilOrganicMatter: same as MultiRootZone.1_Slurp1_Primary.Soil.SoilOrganicMatter
        Sample Initial nitrogen: NO3Units=kgha; NH4Units=ppm; SWUnits=Volumetric; OCUnits=Total; PHUnits=Water
          Thickness  NO3  NH4
          100        17   0
          200        30   0
          300        5    0
          300        5    0
          300        0    0
          300        0    0
      Plant Slurp: CropType=Slurp
      MicroClimate: same as MultiRootZone.1_Slurp1_Primary.MicroClimate
      Irrigation
      Fertiliser
      Manager SlurpSowingRule: same as MultiRootZone.1_Slurp1_Primary.SlurpSowingRule
      SurfaceOrganicMatter surface organic matter: same as MultiRootZone.1_Slurp1_Primary.surface organic matter
      Report: EventNames=[Clock].DoReport
        VariableNames:
          [Clock].Today
          sum([Soil].SoilWater.SWmm) as SumSW
          [Slurp].Leaf.PotentialEP
          [Slurp].Root.WaterUptake
          [Slurp].Root.InitialDM
          [Slurp].Root.Live.Wt
          [Slurp].Root.WaterUptakeByZone
      Manager ResetProduction: same as MultiRootZone.1_Slurp1_Primary.ResetProduction
      Manager ResetLAI: same as MultiRootZone.1_Slurp1_Primary.ResetLAI
      Manager Automatic irrigation based on water deficit: same as MultiRootZone.1_Slurp1_Primary.Automatic irrigation based on water deficit
  Simulation MultiRootZone1: Area=0; Slope=0
    ControlledEnvironment: MaxT=15; MinT=15; Rain=0; Radn=15; PanEvap=3; VP=2; Wind=3; CO2=350; Latitude=-45; DayLength=12
    Clock: StartDate=2000-01-01; EndDate=2000-03-31
    Summary
    SoilArbitrator Soil Arbitrator
    Zone 1_Slurp1_Primary: Area=0; Slope=0
      Soil: same as MultiRootZone.1_Slurp1_Primary.Soil
      Plant Slurp: CropType=Slurp
      MicroClimate: same as MultiRootZone.1_Slurp1_Primary.MicroClimate
      Irrigation
      Fertiliser
      Manager SlurpSowingRule: same as MultiRootZone.1_Slurp1_Primary.SlurpSowingRule
      SurfaceOrganicMatter surface organic matter: same as MultiRootZone.1_Slurp1_Primary.surface organic matter
      Report: EventNames=[Clock].DoReport
        VariableNames:
          [Clock].Today
          sum([Soil].SoilWater.SWmm) as SumSW
          [Slurp].Leaf.PotentialEP
          [Slurp].Root.WaterUptake
          [Slurp].Root.InitialDM
          [Slurp].Root.Live.Wt
      Manager ResetProduction: same as MultiRootZone.1_Slurp1_Primary.ResetProduction
      Manager ResetLAI: same as MultiRootZone.1_Slurp1_Primary.ResetLAI
      Manager SetupRootZones: same as MultiRootZone.1_Slurp1_Primary.SetupRootZones
      Manager Automatic irrigation based on water deficit: same as MultiRootZone.1_Slurp1_Primary.Automatic irrigation based on water deficit
    Zone 2_Slurp1_Secondary: same as MultiRootZone.2_Slurp1_Secondary
    Zone 3_Slurp_Solo: Area=0; Slope=0
      Soil: same as MultiRootZone.1_Slurp1_Primary.Soil
      Plant Slurp: CropType=Slurp
      MicroClimate: same as MultiRootZone.1_Slurp1_Primary.MicroClimate
      Irrigation
      Fertiliser
      Manager SlurpSowingRule: same as MultiRootZone.1_Slurp1_Primary.SlurpSowingRule
      SurfaceOrganicMatter surface organic matter: same as MultiRootZone.1_Slurp1_Primary.surface organic matter
      Report: EventNames=[Clock].DoReport
        VariableNames:
          [Clock].Today
          sum([Soil].SoilWater.SWmm) as SumSW
          [Slurp].Leaf.PotentialEP
          [Slurp].Root.WaterUptake
          [Slurp].Root.InitialDM
          [Slurp].Root.Live.Wt
      Manager ResetProduction: same as MultiRootZone.1_Slurp1_Primary.ResetProduction
      Manager ResetLAI: same as MultiRootZone.1_Slurp1_Primary.ResetLAI
      Manager Automatic irrigation based on water deficit: same as MultiRootZone.1_Slurp1_Primary.Automatic irrigation based on water deficit
    Zone 4_BareSoil: same as MultiRootZone.2_Slurp1_Secondary
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